// cd /Users/mcde601/src/opendss/source/cmd/test/
// redirect IEEE13Base.dss
// cd /Users/mcde601/src/epri_dpv/J1/
// redirect Master_noPV.dss

cd /home/tom/src/OpenDSS/Test/
redirect IEEE13_CDPSM.dss
solve
cd /home/tom/src/OpenDSS/Source/CMD/test/
export cim100 substation=subname geo=region subgeo=subregion file=ieee13cdpsm.xml

cd /home/tom/src/OpenDSS/Test/
redirect IEEE13_Assets.dss
solve
cd /home/tom/src/OpenDSS/Source/CMD/test/
export cim100 substation=subname geo=region subgeo=subregion file=ieee13assets.xml
